// SBML level 3 version 1

model NetGenerator__Minimal_Model()
  // NetGenerator - Minimal Model
  // isDescribedBy pubmed.db:23803467
  // model units - substance: log2fc, time: time, extent: dimensionless

  // Compartments:
  compartment cell = 1 litre;  // GO:0005623

  // Species:
  substanceOnly species $Input in cell;
  substanceOnly species $G1 in cell = 0;
  substanceOnly species $G2 in cell = 0;

  // Parameters:
  k_G1_G1 = 1 per_time;
  k_G1_G2 = 1 per_time;
  k_G2_G2 = -1 per_time;
  k_Input_G1 = 1 per_time;

  // Assignment rules:
  Input := piecewise(1, time > 0, 0);

  // Rate rules:
  G1' = k_G1_G1*G1 + k_Input_G1*Input;
  G2' = k_G1_G2*G1 + k_G2_G2*G2;

  // Reactions:
  expression_of_G1: -> SpeciesReference_G1_ReactionID_expression_of_G1 $G1; ;  // modifiers: Input; GO:0010467
  expression_of_G2: -> SpeciesReference_G2_ReactionID_expression_of_G2 $G2; ;  // modifiers: G1; GO:0010467

  // Unit definitions:
  unit log2fc = dimensionless; log2fc is "log2 fold-change";
  unit time = 3600 second;
  unit per_time = 1 / (3600 second);
end
